*Heading
** Job name: dz3D Model name: Level1_08_sub
** Generated by: Abaqus/CAE 6.14-1
*Preprint, echo=NO, model=NO, history=NO, contact=NO
**
** PARTS
**
*Part, name=Part-6
*End Part
**
**
** ASSEMBLY
**
*Assembly, name=Assembly
**
*Instance, name=Part-6-1, part=Part-6
       4955.,           0.,           0.
       4955.,           0.,           0., 4955.5199879268, -0.519987926796701, 0.677661456233666, 111.752039978796
*Node
      1,   667.294983,    3015.1499,           0.
      2,   735.124512,   2995.83252,           0.
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*Element, type=C3D8R
   1,   27,   28,    2,    1, 1041, 1042, 1016, 1015
   2,   28,   29,    3,    2, 1042, 1043, 1017, 1016
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*End Instance
**
*Nset, nset=interface, instance=Part-6-1
    1,    2,    3,    4,    5,   27
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*Elset, elset=interface, instance=Part-6-1
    1,    2,    3,    4,   26,   51
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*Surface, type=NODE, name="OGV ALL_CNS_", internal
"OGV ALL", 1.
*Surface, type=NODE, name=s_Set-172_CNS_, internal
s_Set-172, 1.
*Surface, type=NODE, name=s_Set-77_CNS_, internal
s_Set-77, 1.
*Surface, type=NODE, name="intercase slave_CNS_", internal
"intercase slave", 1.
*Surface, type=NODE, name="Roll bearing hp ip slave_CNS_", internal
"Roll bearing hp ip slave", 1.
*Surface, type=NODE, name="tail roller slave_CNS_", internal
"tail roller slave", 1.
*Surface, type=NODE, name=s_Set-26_CNS_, internal
s_Set-26, 1.
*Surface, type=NODE, name=s_Set-63_CNS_, internal
s_Set-63, 1.
*Surface, type=NODE, name=s_Set-64_CNS_, internal
s_Set-64, 1.
*Surface, type=NODE, name=s_Set-65_CNS_, internal
s_Set-65, 1.
*Surface, type=NODE, name=s_Set-66_CNS_, internal
s_Set-66, 1.
*Surface, type=NODE, name=s_Set-67_CNS_, internal
s_Set-67, 1.
*Surface, type=NODE, name=s_Set-68_CNS_, internal
s_Set-68, 1.
*Surface, type=NODE, name=s_Set-112_CNS_, internal
s_Set-112, 1.
*Surface, type=NODE, name=s_Set-114_CNS_, internal
s_Set-114, 1.
** Constraint: Constraint-1
*Tie, name=Constraint-1, adjust=no, position tolerance=1.
s_Set-172_CNS_, "OGV ALL_CNS_"
** Constraint: Constraint-2
*Tie, name=Constraint-2, adjust=no, position tolerance=1.
m_Surf-7, "OGV ALL_CNS_"
** Constraint: Constraint-4
*Coupling, constraint name=Constraint-4, ref node=m_Set-7, surface=s_Set-77_CNS_
*Kinematic
2, 2
3, 3
5, 5
6, 6
** Constraint: Constraint-5
*Coupling, constraint name=Constraint-5, ref node="INTERCASE MASTER", surface="intercase slave_CNS_"
*Kinematic
** Constraint: Constraint-6
*Coupling, constraint name=Constraint-6, ref node="hp/ip master roller bearing", surface="Roll bearing hp ip slave_CNS_"
*Kinematic
2, 2
3, 3
5, 5
6, 6
** Constraint: Constraint-7
*Coupling, constraint name=Constraint-7, ref node="tail master", surface="tail roller slave_CNS_"
*Kinematic
2, 2
3, 3
5, 5
6, 6
** Constraint: Constraint-8
*Coupling, constraint name=Constraint-8, ref node="Air intake force point", surface=s_Set-26_CNS_
*Distributing, weighting method=UNIFORM, coupling=STRUCTURAL
** Constraint: Constraint-9
*Coupling, constraint name=Constraint-9, ref node=RP-6, surface=s_Set-63_CNS_
*Distributing, weighting method=UNIFORM, coupling=STRUCTURAL
** Constraint: Constraint-10
*Coupling, constraint name=Constraint-10, ref node=m_Set-30, surface=s_Set-64_CNS_
*Distributing, weighting method=UNIFORM, coupling=STRUCTURAL
** Constraint: Constraint-11
*Coupling, constraint name=Constraint-11, ref node=m_Set-32, surface=s_Set-65_CNS_
*Distributing, weighting method=UNIFORM, coupling=STRUCTURAL
** Constraint: Constraint-12
*Coupling, constraint name=Constraint-12, ref node=m_Set-34, surface=s_Set-66_CNS_
*Distributing, weighting method=UNIFORM, coupling=STRUCTURAL
** Constraint: Constraint-13
*Coupling, constraint name=Constraint-13, ref node=m_Set-36, surface=s_Set-67_CNS_
*Distributing, weighting method=UNIFORM, coupling=STRUCTURAL
** Constraint: Constraint-14
*Coupling, constraint name=Constraint-14, ref node=m_Set-38, surface=s_Set-68_CNS_
*Distributing, weighting method=UNIFORM, coupling=STRUCTURAL
** Constraint: Constraint-16
*Coupling, constraint name=Constraint-16, ref node=m_Set-112, surface=s_Set-112_CNS_
*Distributing, weighting method=UNIFORM, coupling=STRUCTURAL
** Constraint: Constraint-17
*Coupling, constraint name=Constraint-17, ref node=m_Set-114, surface=s_Set-114_CNS_
*Distributing, weighting method=UNIFORM, coupling=STRUCTURAL
*Element, type=MASS, elset="Set-116_Mass FAN_MASS_"
*Mass, elset="Set-116_Mass FAN_MASS_"
0.657708,
*Element, type=ROTARYI, elset="Set-116_Mass FAN_ROTI_"
*Rotary Inertia, elset="Set-116_Mass FAN_ROTI_"
2.3e+06, 1.22e+06, 1.22e+06, 0., 0., 0.
*Element, type=MASS, elset="Set-117_Mass torque box_MASS_"
*Mass, elset="Set-117_Mass torque box_MASS_"
0.328854,
*Element, type=ROTARYI, elset="Set-117_Mass torque box_ROTI_"
*Rotary Inertia, elset="Set-117_Mass torque box_ROTI_"
320000., 197000., 197000., 0., 0., 0.
*End Assembly
**
** MATERIALS
**
*Material, name=INCONEL
*Density
 7.8e-09,
*Elastic
210000., 0.29
*Material, name=Titanium
*Density
 4.507e-09,
*Elastic
110000., 0.31
** ----------------------------------------------------------------
**
** STEP: Step-1
**
*Step, name=Step-1, nlgeom=NO, perturbation
*Frequency, eigensolver=Lanczos, acoustic coupling=on, normalization=displacement
, , 50., , ,
**
** OUTPUT REQUESTS
**
*Restart, write, frequency=0
**
** FIELD OUTPUT: F-Output-1
**
*Output, field, variable=PRESELECT
*End Step
