*Heading
** Job name: lin_pert10 Model name: static_disp
** Generated by: Abaqus/CAE 6.14-1
*Preprint, echo=NO, model=NO, history=NO, contact=NO
** ----------------------------------------------------------------
**
** PART INSTANCE: FAN casing-1
**
*System
0.,          0.,          0., -6.12323399573677e-17, 6.12323399573677e-17,          1.
1., -1.22464679914735e-16, 6.12323399573677e-17
*Node
1,  -1821.02673,        2286.,   226.023468
2,  -1821.02673,    2055.6001,   226.023468
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*Element, type=S4R
1,    1,  209, 1993,  216
2,  209,  210, 1994, 1993
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*Nset, nset="FAN casing-1_Set-1", generate
1,  4800,     1
*Elset, elset="FAN casing-1_Set-1", generate
1,  4640,     1
** Section: FAN casing property
*Shell Section, elset="FAN casing-1_Set-1", material=Titanium
13.423, 5
** ----------------------------------------------------------------
**
** PART INSTANCE: ROTOR-1
**
*System
0.,          0.,          0., 6.12323399573677e-17,         -1.,          0.
*Node
4801,           0.,       4977.5,           0.
4802,           0.,    4847.6001,           0.
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*Element, type=B31
4641, 4801, 4829
4642, 4829, 4802
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*Nset, nset=ROTOR-1_Set-1, generate
4801, 4865,   1
*Elset, elset=ROTOR-1_Set-1, generate
4641, 4704,   1
*Nset, nset=ROTOR-1_Set-2, generate
4801, 4865,   1
*Elset, elset=ROTOR-1_Set-2, generate
4641, 4704,   1
** Section: SHAFT SECTION  Profile: Profile-1
*Beam General Section, elset=ROTOR-1_Set-1, density=4.5e-09, section=GENERAL
583150., 7.1452e+07, 0., 7.1452e+07, 1.429e+08
0.,0.,-1.
110000., 41984.7
** ----------------------------------------------------------------
**
** PART INSTANCE: OGV-1
**
*System
2055.6,          0.,  624.617502,      2056.6,          0.,  624.617502
2055.6, 6.12323399573677e-17,  625.617502
*Node
4866,           0.,   1210.38245,           0.
4867,           0.,   1129.69031,           0.
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*Element, type=B31
4705, 4866, 4867
4706, 4867, 4868
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*Nset, nset=OGV-1_Set-1, generate
4866, 4881,   1
*Elset, elset=OGV-1_Set-1, generate
4705, 4719,   1
*Nset, nset=OGV-1_Set-2, generate
4866, 4881,   1
*Elset, elset=OGV-1_Set-2, generate
4705, 4719,   1
** Section: OGV SECTION  Profile: Profile-2
*Beam General Section, elset=OGV-1_Set-1, section=GENERAL
250290., 84364., 0., 84364., 168730.
0.,1.,-6.12323e-17
110000., 41984.7
** ----------------------------------------------------------------
**
** PART INSTANCE: OGV-1-rad-2
**
*System
2055.6,-97.7117047801353,616.92742405706,      2056.6,-97.7117047801353,616.92742405706
2055.6,-97.8681392451756,617.915112397655
*Node
4882,           0.,   1210.38245,           0.
4883,           0.,   1129.69031,           0.
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*Element, type=B31
4720, 4882, 4883
4721, 4883, 4884
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*Nset, nset=OGV-1-rad-2_Set-1, generate
4882, 4897,   1
*Elset, elset=OGV-1-rad-2_Set-1, generate
4720, 4734,   1
*Nset, nset=OGV-1-rad-2_Set-2, generate
4882, 4897,   1
*Elset, elset=OGV-1-rad-2_Set-2, generate
4720, 4734,   1
** Section: OGV SECTION  Profile: Profile-2
*Beam General Section, elset=OGV-1-rad-2_Set-1, section=GENERAL
250290., 84364., 0., 84364., 168730.
0.,0.987688,0.156434
110000., 41984.7
** ----------------------------------------------------------------
**
** PART INSTANCE: OGV-1-rad-3
**
*System
2055.6,-193.017423102028,594.046545469101,      2056.6,-193.017423102028,594.046545469101
2055.6,-193.326440096403,594.997601985396
*Node
4898,           0.,   1210.38245,           0.
4899,           0.,   1129.69031,           0.
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*Element, type=B31
4735, 4898, 4899
4736, 4899, 4900
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*Nset, nset=OGV-1-rad-3_Set-1, generate
4898, 4913,   1
*Elset, elset=OGV-1-rad-3_Set-1, generate
4735, 4749,   1
*Nset, nset=OGV-1-rad-3_Set-2, generate
4898, 4913,   1
*Elset, elset=OGV-1-rad-3_Set-2, generate
4735, 4749,   1
** Section: OGV SECTION  Profile: Profile-2
*Beam General Section, elset=OGV-1-rad-3_Set-1, section=GENERAL
250290., 84364., 0., 84364., 168730.
0.,0.951057,0.309017
110000., 41984.7
** ----------------------------------------------------------------
**
** PART INSTANCE: OGV-1-rad-4
**
*System
2055.6,-283.570411879047,556.538269404241,      2056.6,-283.570411879047,556.538269404241
2055.6,-284.024402378787,557.429275928429
*Node
4914,           0.,   1210.38245,           0.
4915,           0.,   1129.69031,           0.
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*Element, type=B31
4750, 4914, 4915
4751, 4915, 4916
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*Nset, nset=OGV-1-rad-4_Set-1, generate
4914, 4929,   1
*Elset, elset=OGV-1-rad-4_Set-1, generate
4750, 4764,   1
*Nset, nset=OGV-1-rad-4_Set-2, generate
4914, 4929,   1
*Elset, elset=OGV-1-rad-4_Set-2, generate
4750, 4764,   1
** Section: OGV SECTION  Profile: Profile-2
*Beam General Section, elset=OGV-1-rad-4_Set-1, section=GENERAL
250290., 84364., 0., 84364., 168730.
0.,0.891007,0.45399
110000., 41984.7
** ----------------------------------------------------------------
**
** PART INSTANCE: OGV-1-rad-5
**
*System
2055.6,-367.140955999364,505.326174102028,      2056.6,-367.140955999364,505.326174102028
2055.6,-367.728741251657,506.135191096403
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*Elset, elset=OGV-1-rad-5_Set-1, generate
4765, 4779,   1
*Nset, nset=OGV-1-rad-5_Set-2, generate
4930, 4945,   1
*Elset, elset=OGV-1-rad-5_Set-2, generate
4765, 4779,   1
** Section: OGV SECTION  Profile: Profile-2
*Beam General Section, elset=OGV-1-rad-5_Set-1, section=GENERAL
250290., 84364., 0., 84364., 168730.
0.,0.809017,0.587785
110000., 41984.7
** ----------------------------------------------------------------
**
** PART INSTANCE: OGV-1-rad-6
**
*System
2055.6,-441.671271312002,441.671271312002,      2056.6,-441.671271312002,441.671271312002
2055.6,-442.378378093188,442.378378093188
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*Elset, elset=OGV-1-rad-6_Set-1, generate
4780, 4794,   1
*Nset, nset=OGV-1-rad-6_Set-2, generate
4946, 4961,   1
*Elset, elset=OGV-1-rad-6_Set-2, generate
4780, 4794,   1
** Section: OGV SECTION  Profile: Profile-2
*Beam General Section, elset=OGV-1-rad-6_Set-1, section=GENERAL
250290., 84364., 0., 84364., 168730.
0.,0.707107,0.707107
110000., 41984.7
** ----------------------------------------------------------------
**
** PART INSTANCE: OGV-1-rad-7
**
*System
2055.6,-505.326174102028,367.140955999364,      2056.6,-505.326174102028,367.140955999364
2055.6,-506.135191096403,367.728741251657
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*Elset, elset=OGV-1-rad-7_Set-1, generate
4795, 4809,   1
*Nset, nset=OGV-1-rad-7_Set-2, generate
4962, 4977,   1
*Elset, elset=OGV-1-rad-7_Set-2, generate
4795, 4809,   1
** Section: OGV SECTION  Profile: Profile-2
*Beam General Section, elset=OGV-1-rad-7_Set-1, section=GENERAL
250290., 84364., 0., 84364., 168730.
0.,0.587785,0.809017
110000., 41984.7
** ----------------------------------------------------------------
**
** PART INSTANCE: OGV-1-rad-8
**
*System
2055.6,-556.538269404241,283.570411879047,      2056.6,-556.538269404241,283.570411879047
2055.6,-557.429275928429,284.024402378787
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*Elset, elset=OGV-1-rad-8_Set-1, generate
4810, 4824,   1
*Nset, nset=OGV-1-rad-8_Set-2, generate
4978, 4993,   1
*Elset, elset=OGV-1-rad-8_Set-2, generate
4810, 4824,   1
** Section: OGV SECTION  Profile: Profile-2
*Beam General Section, elset=OGV-1-rad-8_Set-1, section=GENERAL
250290., 84364., 0., 84364., 168730.
0.,0.45399,0.891007
110000., 41984.7
** ----------------------------------------------------------------
**
** PART INSTANCE: OGV-1-rad-9
**
*System
2055.6,-594.046545469101,193.017423102028,      2056.6,-594.046545469101,193.017423102028
2055.6,-594.997601985396,193.326440096403
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*Elset, elset=OGV-1-rad-9_Set-1, generate
4825, 4839,   1
*Nset, nset=OGV-1-rad-9_Set-2, generate
4994, 5009,   1
*Elset, elset=OGV-1-rad-9_Set-2, generate
4825, 4839,   1
** Section: OGV SECTION  Profile: Profile-2
*Beam General Section, elset=OGV-1-rad-9_Set-1, section=GENERAL
250290., 84364., 0., 84364., 168730.
0.,0.309017,0.951057
110000., 41984.7
** ----------------------------------------------------------------
**
** PART INSTANCE: OGV-1-rad-10
**
*System
2055.6,-616.92742405706,97.7117047801354,      2056.6,-616.92742405706,97.7117047801354
2055.6,-617.915112397655,97.8681392451756
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*Elset, elset=OGV-1-rad-10_Set-1, generate
4840, 4854,   1
*Nset, nset=OGV-1-rad-10_Set-2, generate
5010, 5025,   1
*Elset, elset=OGV-1-rad-10_Set-2, generate
4840, 4854,   1
** Section: OGV SECTION  Profile: Profile-2
*Beam General Section, elset=OGV-1-rad-10_Set-1, section=GENERAL
250290., 84364., 0., 84364., 168730.
0.,0.156434,0.987688
110000., 41984.7
** ----------------------------------------------------------------
**
** PART INSTANCE: OGV-1-rad-11
**
*System
2055.6, -624.617502,          0.,      2056.6, -624.617502,          0.
2055.6, -625.617502, 1.22464679914735e-16
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*Elset, elset=OGV-1-rad-11_Set-1, generate
4855, 4869,   1
*Nset, nset=OGV-1-rad-11_Set-2, generate
5026, 5041,   1
*Elset, elset=OGV-1-rad-11_Set-2, generate
4855, 4869,   1
** Section: OGV SECTION  Profile: Profile-2
*Beam General Section, elset=OGV-1-rad-11_Set-1, section=GENERAL
250290., 84364., 0., 84364., 168730.
0.,1.22465e-16,1.
110000., 41984.7
** ----------------------------------------------------------------
**
** PART INSTANCE: OGV-1-rad-12
**
*System
2055.6,-616.92742405706,-97.7117047801354,      2056.6,-616.92742405706,-97.7117047801354
2055.6,-617.915112397655,-97.8681392451757
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*Elset, elset=OGV-1-rad-12_Set-1, generate
4870, 4884,   1
*Nset, nset=OGV-1-rad-12_Set-2, generate
5042, 5057,   1
*Elset, elset=OGV-1-rad-12_Set-2, generate
4870, 4884,   1
** Section: OGV SECTION  Profile: Profile-2
*Beam General Section, elset=OGV-1-rad-12_Set-1, section=GENERAL
250290., 84364., 0., 84364., 168730.
0.,-0.156434,0.987688
110000., 41984.7
** ----------------------------------------------------------------
**
** PART INSTANCE: OGV-1-rad-13
**
*System
2055.6,-594.046545469101,-193.017423102028,      2056.6,-594.046545469101,-193.017423102028
2055.6,-594.997601985396,-193.326440096403
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*Elset, elset=OGV-1-rad-13_Set-1, generate
4885, 4899,   1
*Nset, nset=OGV-1-rad-13_Set-2, generate
5058, 5073,   1
*Elset, elset=OGV-1-rad-13_Set-2, generate
4885, 4899,   1
** Section: OGV SECTION  Profile: Profile-2
*Beam General Section, elset=OGV-1-rad-13_Set-1, section=GENERAL
250290., 84364., 0., 84364., 168730.
0.,-0.309017,0.951057
110000., 41984.7
** ----------------------------------------------------------------
**
** PART INSTANCE: OGV-1-rad-14
**
*System
2055.6,-556.538269404241,-283.570411879047,      2056.6,-556.538269404241,-283.570411879047
2055.6,-557.429275928429,-284.024402378787
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*Elset, elset=OGV-1-rad-14_Set-1, generate
4900, 4914,   1
*Nset, nset=OGV-1-rad-14_Set-2, generate
5074, 5089,   1
*Elset, elset=OGV-1-rad-14_Set-2, generate
4900, 4914,   1
** Section: OGV SECTION  Profile: Profile-2
*Beam General Section, elset=OGV-1-rad-14_Set-1, section=GENERAL
250290., 84364., 0., 84364., 168730.
0.,-0.45399,0.891007
110000., 41984.7
** ----------------------------------------------------------------
**
** PART INSTANCE: OGV-1-rad-15
**
*System
2055.6,-505.326174102028,-367.140955999364,      2056.6,-505.326174102028,-367.140955999364
2055.6,-506.135191096403,-367.728741251657
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*Elset, elset=OGV-1-rad-15_Set-1, generate
4915, 4929,   1
*Nset, nset=OGV-1-rad-15_Set-2, generate
5090, 5105,   1
*Elset, elset=OGV-1-rad-15_Set-2, generate
4915, 4929,   1
** Section: OGV SECTION  Profile: Profile-2
*Beam General Section, elset=OGV-1-rad-15_Set-1, section=GENERAL
250290., 84364., 0., 84364., 168730.
0.,-0.587785,0.809017
110000., 41984.7
** ----------------------------------------------------------------
**
** PART INSTANCE: OGV-1-rad-16
**
*System
2055.6,-441.671271312002,-441.671271312002,      2056.6,-441.671271312002,-441.671271312002
2055.6,-442.378378093188,-442.378378093188
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*Elset, elset=OGV-1-rad-16_Set-1, generate
4930, 4944,   1
*Nset, nset=OGV-1-rad-16_Set-2, generate
5106, 5121,   1
*Elset, elset=OGV-1-rad-16_Set-2, generate
4930, 4944,   1
** Section: OGV SECTION  Profile: Profile-2
*Beam General Section, elset=OGV-1-rad-16_Set-1, section=GENERAL
250290., 84364., 0., 84364., 168730.
0.,-0.707107,0.707107
110000., 41984.7
** ----------------------------------------------------------------
**
** PART INSTANCE: OGV-1-rad-17
**
*System
2055.6,-367.140955999364,-505.326174102028,      2056.6,-367.140955999364,-505.326174102028
2055.6,-367.728741251657,-506.135191096403
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*Elset, elset=OGV-1-rad-17_Set-1, generate
4945, 4959,   1
*Nset, nset=OGV-1-rad-17_Set-2, generate
5122, 5137,   1
*Elset, elset=OGV-1-rad-17_Set-2, generate
4945, 4959,   1
** Section: OGV SECTION  Profile: Profile-2
*Beam General Section, elset=OGV-1-rad-17_Set-1, section=GENERAL
250290., 84364., 0., 84364., 168730.
0.,-0.809017,0.587785
110000., 41984.7
** ----------------------------------------------------------------
**
** PART INSTANCE: OGV-1-rad-18
**
*System
2055.6,-283.570411879047,-556.538269404241,      2056.6,-283.570411879047,-556.538269404241
2055.6,-284.024402378787,-557.429275928429
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*Elset, elset=OGV-1-rad-18_Set-1, generate
4960, 4974,   1
*Nset, nset=OGV-1-rad-18_Set-2, generate
5138, 5153,   1
*Elset, elset=OGV-1-rad-18_Set-2, generate
4960, 4974,   1
** Section: OGV SECTION  Profile: Profile-2
*Beam General Section, elset=OGV-1-rad-18_Set-1, section=GENERAL
250290., 84364., 0., 84364., 168730.
0.,-0.891007,0.45399
110000., 41984.7
** ----------------------------------------------------------------
**
** PART INSTANCE: OGV-1-rad-19
**
*System
2055.6,-193.017423102028,-594.046545469101,      2056.6,-193.017423102028,-594.046545469101
2055.6,-193.326440096403,-594.997601985396
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*Elset, elset=OGV-1-rad-19_Set-1, generate
4975, 4989,   1
*Nset, nset=OGV-1-rad-19_Set-2, generate
5154, 5169,   1
*Elset, elset=OGV-1-rad-19_Set-2, generate
4975, 4989,   1
** Section: OGV SECTION  Profile: Profile-2
*Beam General Section, elset=OGV-1-rad-19_Set-1, section=GENERAL
250290., 84364., 0., 84364., 168730.
0.,-0.951057,0.309017
110000., 41984.7
** ----------------------------------------------------------------
**
** PART INSTANCE: OGV-1-rad-20
**
*System
2055.6,-97.7117047801354,-616.92742405706,      2056.6,-97.7117047801354,-616.92742405706
2055.6,-97.8681392451756,-617.915112397655
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*Elset, elset=OGV-1-rad-20_Set-1, generate
4990, 5004,   1
*Nset, nset=OGV-1-rad-20_Set-2, generate
5170, 5185,   1
*Elset, elset=OGV-1-rad-20_Set-2, generate
4990, 5004,   1
** Section: OGV SECTION  Profile: Profile-2
*Beam General Section, elset=OGV-1-rad-20_Set-1, section=GENERAL
250290., 84364., 0., 84364., 168730.
0.,-0.987688,0.156434
110000., 41984.7
** ----------------------------------------------------------------
**
** PART INSTANCE: OGV-1-rad-21
**
*System
2055.6,          0., -624.617502,      2056.6,          0., -624.617502
2055.6, -1.83697019872103e-16, -625.617502
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*Elset, elset=OGV-1-rad-21_Set-1, generate
5005, 5019,   1
*Nset, nset=OGV-1-rad-21_Set-2, generate
5186, 5201,   1
*Elset, elset=OGV-1-rad-21_Set-2, generate
5005, 5019,   1
** Section: OGV SECTION  Profile: Profile-2
*Beam General Section, elset=OGV-1-rad-21_Set-1, section=GENERAL
250290., 84364., 0., 84364., 168730.
0.,-1.,1.83697e-16
110000., 41984.7
** ----------------------------------------------------------------
**
** PART INSTANCE: OGV-1-rad-22
**
*System
2055.6,97.7117047801352,-616.92742405706,      2056.6,97.7117047801352,-616.92742405706
2055.6,97.8681392451755,-617.915112397655
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*Elset, elset=OGV-1-rad-22_Set-1, generate
5020, 5034,   1
*Nset, nset=OGV-1-rad-22_Set-2, generate
5202, 5217,   1
*Elset, elset=OGV-1-rad-22_Set-2, generate
5020, 5034,   1
** Section: OGV SECTION  Profile: Profile-2
*Beam General Section, elset=OGV-1-rad-22_Set-1, section=GENERAL
250290., 84364., 0., 84364., 168730.
0.,-0.987688,-0.156434
110000., 41984.7
** ----------------------------------------------------------------
**
** PART INSTANCE: OGV-1-rad-23
**
*System
2055.6,193.017423102028,-594.046545469101,      2056.6,193.017423102028,-594.046545469101
2055.6,193.326440096403,-594.997601985396
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*Elset, elset=OGV-1-rad-23_Set-1, generate
5035, 5049,   1
*Nset, nset=OGV-1-rad-23_Set-2, generate
5218, 5233,   1
*Elset, elset=OGV-1-rad-23_Set-2, generate
5035, 5049,   1
** Section: OGV SECTION  Profile: Profile-2
*Beam General Section, elset=OGV-1-rad-23_Set-1, section=GENERAL
250290., 84364., 0., 84364., 168730.
0.,-0.951057,-0.309017
110000., 41984.7
** ----------------------------------------------------------------
**
** PART INSTANCE: OGV-1-rad-24
**
*System
2055.6,283.570411879047,-556.538269404241,      2056.6,283.570411879047,-556.538269404241
2055.6,284.024402378787,-557.429275928429
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*Elset, elset=OGV-1-rad-24_Set-1, generate
5050, 5064,   1
*Nset, nset=OGV-1-rad-24_Set-2, generate
5234, 5249,   1
*Elset, elset=OGV-1-rad-24_Set-2, generate
5050, 5064,   1
** Section: OGV SECTION  Profile: Profile-2
*Beam General Section, elset=OGV-1-rad-24_Set-1, section=GENERAL
250290., 84364., 0., 84364., 168730.
0.,-0.891007,-0.45399
110000., 41984.7
** ----------------------------------------------------------------
**
** PART INSTANCE: OGV-1-rad-25
**
*System
2055.6,367.140955999364,-505.326174102028,      2056.6,367.140955999364,-505.326174102028
2055.6,367.728741251657,-506.135191096403
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*Elset, elset=OGV-1-rad-25_Set-1, generate
5065, 5079,   1
*Nset, nset=OGV-1-rad-25_Set-2, generate
5250, 5265,   1
*Elset, elset=OGV-1-rad-25_Set-2, generate
5065, 5079,   1
** Section: OGV SECTION  Profile: Profile-2
*Beam General Section, elset=OGV-1-rad-25_Set-1, section=GENERAL
250290., 84364., 0., 84364., 168730.
0.,-0.809017,-0.587785
110000., 41984.7
** ----------------------------------------------------------------
**
** PART INSTANCE: OGV-1-rad-26
**
*System
2055.6,441.671271312002,-441.671271312002,      2056.6,441.671271312002,-441.671271312002
2055.6,442.378378093188,-442.378378093189
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*Elset, elset=OGV-1-rad-26_Set-1, generate
5080, 5094,   1
*Nset, nset=OGV-1-rad-26_Set-2, generate
5266, 5281,   1
*Elset, elset=OGV-1-rad-26_Set-2, generate
5080, 5094,   1
** Section: OGV SECTION  Profile: Profile-2
*Beam General Section, elset=OGV-1-rad-26_Set-1, section=GENERAL
250290., 84364., 0., 84364., 168730.
0.,-0.707107,-0.707107
110000., 41984.7
** ----------------------------------------------------------------
**
** PART INSTANCE: OGV-1-rad-27
**
*System
2055.6,505.326174102028,-367.140955999364,      2056.6,505.326174102028,-367.140955999364
2055.6,506.135191096403,-367.728741251657
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*Elset, elset=OGV-1-rad-27_Set-1, generate
5095, 5109,   1
*Nset, nset=OGV-1-rad-27_Set-2, generate
5282, 5297,   1
*Elset, elset=OGV-1-rad-27_Set-2, generate
5095, 5109,   1
** Section: OGV SECTION  Profile: Profile-2
*Beam General Section, elset=OGV-1-rad-27_Set-1, section=GENERAL
250290., 84364., 0., 84364., 168730.
0.,-0.587785,-0.809017
110000., 41984.7
** ----------------------------------------------------------------
**
** PART INSTANCE: OGV-1-rad-28
**
*System
2055.6,556.538269404241,-283.570411879047,      2056.6,556.538269404241,-283.570411879047
2055.6,557.429275928429,-284.024402378787
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*Elset, elset=OGV-1-rad-28_Set-1, generate
5110, 5124,   1
*Nset, nset=OGV-1-rad-28_Set-2, generate
5298, 5313,   1
*Elset, elset=OGV-1-rad-28_Set-2, generate
5110, 5124,   1
** Section: OGV SECTION  Profile: Profile-2
*Beam General Section, elset=OGV-1-rad-28_Set-1, section=GENERAL
250290., 84364., 0., 84364., 168730.
0.,-0.45399,-0.891007
110000., 41984.7
** ----------------------------------------------------------------
**
** PART INSTANCE: OGV-1-rad-29
**
*System
2055.6,594.046545469101,-193.017423102028,      2056.6,594.046545469101,-193.017423102028
2055.6,594.997601985396,-193.326440096403
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*Elset, elset=OGV-1-rad-29_Set-1, generate
5125, 5139,   1
*Nset, nset=OGV-1-rad-29_Set-2, generate
5314, 5329,   1
*Elset, elset=OGV-1-rad-29_Set-2, generate
5125, 5139,   1
** Section: OGV SECTION  Profile: Profile-2
*Beam General Section, elset=OGV-1-rad-29_Set-1, section=GENERAL
250290., 84364., 0., 84364., 168730.
0.,-0.309017,-0.951057
110000., 41984.7
** ----------------------------------------------------------------
**
** PART INSTANCE: OGV-1-rad-30
**
*System
2055.6,616.92742405706,-97.7117047801354,      2056.6,616.92742405706,-97.7117047801354
2055.6,617.915112397655,-97.8681392451757
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*Elset, elset=OGV-1-rad-30_Set-1, generate
5140, 5154,   1
*Nset, nset=OGV-1-rad-30_Set-2, generate
5330, 5345,   1
*Elset, elset=OGV-1-rad-30_Set-2, generate
5140, 5154,   1
** Section: OGV SECTION  Profile: Profile-2
*Beam General Section, elset=OGV-1-rad-30_Set-1, section=GENERAL
250290., 84364., 0., 84364., 168730.
0.,-0.156434,-0.987688
110000., 41984.7
** ----------------------------------------------------------------
**
** PART INSTANCE: OGV-1-rad-31
**
*System
2055.6,  624.617502,          0.,      2056.6,  624.617502,          0.
2055.6,  625.617502, -2.44929359829471e-16
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*Elset, elset=OGV-1-rad-31_Set-1, generate
5155, 5169,   1
*Nset, nset=OGV-1-rad-31_Set-2, generate
5346, 5361,   1
*Elset, elset=OGV-1-rad-31_Set-2, generate
5155, 5169,   1
** Section: OGV SECTION  Profile: Profile-2
*Beam General Section, elset=OGV-1-rad-31_Set-1, section=GENERAL
250290., 84364., 0., 84364., 168730.
0.,-2.44929e-16,-1.
110000., 41984.7
** ----------------------------------------------------------------
**
** PART INSTANCE: OGV-1-rad-32
**
*System
2055.6,616.92742405706,97.7117047801352,      2056.6,616.92742405706,97.7117047801352
2055.6,617.915112397655,97.8681392451754
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*Elset, elset=OGV-1-rad-32_Set-1, generate
5170, 5184,   1
*Nset, nset=OGV-1-rad-32_Set-2, generate
5362, 5377,   1
*Elset, elset=OGV-1-rad-32_Set-2, generate
5170, 5184,   1
** Section: OGV SECTION  Profile: Profile-2
*Beam General Section, elset=OGV-1-rad-32_Set-1, section=GENERAL
250290., 84364., 0., 84364., 168730.
0.,0.156434,-0.987688
110000., 41984.7
** ----------------------------------------------------------------
**
** PART INSTANCE: OGV-1-rad-33
**
*System
2055.6,594.046545469101,193.017423102028,      2056.6,594.046545469101,193.017423102028
2055.6,594.997601985396,193.326440096403
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*Elset, elset=OGV-1-rad-33_Set-1, generate
5185, 5199,   1
*Nset, nset=OGV-1-rad-33_Set-2, generate
5378, 5393,   1
*Elset, elset=OGV-1-rad-33_Set-2, generate
5185, 5199,   1
** Section: OGV SECTION  Profile: Profile-2
*Beam General Section, elset=OGV-1-rad-33_Set-1, section=GENERAL
250290., 84364., 0., 84364., 168730.
0.,0.309017,-0.951057
110000., 41984.7
** ----------------------------------------------------------------
**
** PART INSTANCE: OGV-1-rad-34
**
*System
2055.6,556.538269404241,283.570411879047,      2056.6,556.538269404241,283.570411879047
2055.6,557.429275928429,284.024402378787
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*Elset, elset=OGV-1-rad-34_Set-1, generate
5200, 5214,   1
*Nset, nset=OGV-1-rad-34_Set-2, generate
5394, 5409,   1
*Elset, elset=OGV-1-rad-34_Set-2, generate
5200, 5214,   1
** Section: OGV SECTION  Profile: Profile-2
*Beam General Section, elset=OGV-1-rad-34_Set-1, section=GENERAL
250290., 84364., 0., 84364., 168730.
0.,0.45399,-0.891007
110000., 41984.7
** ----------------------------------------------------------------
**
** PART INSTANCE: OGV-1-rad-35
**
*System
2055.6,505.326174102028,367.140955999364,      2056.6,505.326174102028,367.140955999364
2055.6,506.135191096403,367.728741251657
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*Elset, elset=OGV-1-rad-35_Set-1, generate
5215, 5229,   1
*Nset, nset=OGV-1-rad-35_Set-2, generate
5410, 5425,   1
*Elset, elset=OGV-1-rad-35_Set-2, generate
5215, 5229,   1
** Section: OGV SECTION  Profile: Profile-2
*Beam General Section, elset=OGV-1-rad-35_Set-1, section=GENERAL
250290., 84364., 0., 84364., 168730.
0.,0.587785,-0.809017
110000., 41984.7
** ----------------------------------------------------------------
**
** PART INSTANCE: OGV-1-rad-36
**
*System
2055.6,441.671271312002,441.671271312002,      2056.6,441.671271312002,441.671271312002
2055.6,442.378378093189,442.378378093188
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*Elset, elset=OGV-1-rad-36_Set-1, generate
5230, 5244,   1
*Nset, nset=OGV-1-rad-36_Set-2, generate
5426, 5441,   1
*Elset, elset=OGV-1-rad-36_Set-2, generate
5230, 5244,   1
** Section: OGV SECTION  Profile: Profile-2
*Beam General Section, elset=OGV-1-rad-36_Set-1, section=GENERAL
250290., 84364., 0., 84364., 168730.
0.,0.707107,-0.707107
110000., 41984.7
** ----------------------------------------------------------------
**
** PART INSTANCE: OGV-1-rad-37
**
*System
2055.6,367.140955999364,505.326174102028,      2056.6,367.140955999364,505.326174102028
2055.6,367.728741251657,506.135191096403
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*Elset, elset=OGV-1-rad-37_Set-1, generate
5245, 5259,   1
*Nset, nset=OGV-1-rad-37_Set-2, generate
5442, 5457,   1
*Elset, elset=OGV-1-rad-37_Set-2, generate
5245, 5259,   1
** Section: OGV SECTION  Profile: Profile-2
*Beam General Section, elset=OGV-1-rad-37_Set-1, section=GENERAL
250290., 84364., 0., 84364., 168730.
0.,0.809017,-0.587785
110000., 41984.7
** ----------------------------------------------------------------
**
** PART INSTANCE: OGV-1-rad-38
**
*System
2055.6,283.570411879047,556.538269404241,      2056.6,283.570411879047,556.538269404241
2055.6,284.024402378787,557.429275928429
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*Elset, elset=OGV-1-rad-38_Set-1, generate
5260, 5274,   1
*Nset, nset=OGV-1-rad-38_Set-2, generate
5458, 5473,   1
*Elset, elset=OGV-1-rad-38_Set-2, generate
5260, 5274,   1
** Section: OGV SECTION  Profile: Profile-2
*Beam General Section, elset=OGV-1-rad-38_Set-1, section=GENERAL
250290., 84364., 0., 84364., 168730.
0.,0.891007,-0.45399
110000., 41984.7
** ----------------------------------------------------------------
**
** PART INSTANCE: OGV-1-rad-39
**
*System
2055.6,193.017423102028,594.046545469101,      2056.6,193.017423102028,594.046545469101
2055.6,193.326440096403,594.997601985396
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*Elset, elset=OGV-1-rad-39_Set-1, generate
5275, 5289,   1
*Nset, nset=OGV-1-rad-39_Set-2, generate
5474, 5489,   1
*Elset, elset=OGV-1-rad-39_Set-2, generate
5275, 5289,   1
** Section: OGV SECTION  Profile: Profile-2
*Beam General Section, elset=OGV-1-rad-39_Set-1, section=GENERAL
250290., 84364., 0., 84364., 168730.
0.,0.951057,-0.309017
110000., 41984.7
** ----------------------------------------------------------------
**
** PART INSTANCE: OGV-1-rad-40
**
*System
2055.6,97.7117047801355,616.92742405706,      2056.6,97.7117047801355,616.92742405706
2055.6,97.8681392451757,617.915112397655
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*Elset, elset=OGV-1-rad-40_Set-1, generate
5290, 5304,   1
*Nset, nset=OGV-1-rad-40_Set-2, generate
5490, 5505,   1
*Elset, elset=OGV-1-rad-40_Set-2, generate
5290, 5304,   1
** Section: OGV SECTION  Profile: Profile-2
*Beam General Section, elset=OGV-1-rad-40_Set-1, section=GENERAL
250290., 84364., 0., 84364., 168730.
0.,0.987688,-0.156434
110000., 41984.7
** ----------------------------------------------------------------
**
** PART INSTANCE: core-casing-1
**
*System
4955.,          0.,          0.,       4955., 6.12323399573677e-17,          1.
4954., 3.74939945665464e-33, 6.12323399573677e-17
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*Elset, elset=core-casing-1_Set-1
5748, 5749, 5750, 5751, 5753, 5754
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*Elset, elset=core-casing-1_Set-3
5731, 5732, 5733, 5734, 5735, 5736
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*Nset, nset=core-casing-1_Set-4
5506, 5507, 5508, 5509, 5510, 5511
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*Elset, elset=core-casing-1_Set-4
5305, 5306, 5307, 5308, 5309, 5310
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*Elset, elset=core-casing-1_Set-7
5799, 5800, 5801, 5802, 5803, 5804
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** Section: Casing RWD property
*Shell Section, elset=core-casing-1_Set-4, material=INCONEL
4.093, 5
** Section: Casing MID property
*Shell Section, elset=core-casing-1_Set-3, material=INCONEL
3.6043, 5
** Region: (Casing FWD property:Set-2)
*Elset, elset=core-casing-1__I3
5742, 5743, 5744, 5745, 5746, 5747
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** Section: Casing FWD property
*Shell Section, elset=core-casing-1__I3, material=INCONEL
5.7426, 5
** Section: Torque Boxe property
*Shell Section, elset=core-casing-1_Set-1, material=INCONEL
37.664, 5
** Section: Casing FWD property
*Shell Section, elset=core-casing-1_Set-7, material=INCONEL
5.7426, 5
*System
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*Nset, nset="Air intake force point"
10940,
*Nset, nset="FAN CASING"
5,    6,    8,   11,   12,   23
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*Elset, elset="FAN CASING"
25,   41,   57,   67,   77,   78
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*Nset, nset="FAN CENTER"
4827,
*Nset, nset="HPC1 CASING"
5990, 5991, 6054, 6055, 6121, 6122
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*Elset, elset="HPC1 CASING"
5745, 5746, 5811, 5812, 5813, 5815
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*Nset, nset="HPC1 CENTER"
4821,
*Nset, nset="HPC2 CASING"
5988, 5989, 6056, 6057, 6119, 6120
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*Elset, elset="HPC2 CASING"
5743, 5744, 5814, 5816, 5817, 5818
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*Nset, nset="HPC2 CENTER"
4820,
*Nset, nset="HPC3 CASING"
5986, 5987, 6058, 6059, 6117, 6118
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*Elset, elset="HPC3 CASING"
5742, 5743, 5817, 5818, 5819, 5820
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*Nset, nset="HPC3 CENTER"
4819,
*Nset, nset="HPC4 CASING"
5984, 5985, 6060, 6061, 6115, 6116
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*Elset, elset="HPC4 CASING"
5741, 5742, 5819, 5820, 5821, 5822
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*Nset, nset="HPC4 CENTER"
4818,
*Nset, nset="HPC5 CASING"
5982, 5983, 6062, 6063, 6113, 6114
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*Elset, elset="HPC5 CASING"
5740, 5741, 5821, 5822, 5823, 5824
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*Nset, nset="HPC5 CENTER"
4817,
*Nset, nset="HPC6 CASING"
5980, 5981, 6064, 6065, 6111, 6112
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*Elset, elset="HPC6 CASING"
5739, 5740, 5823, 5824, 5825, 5826
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*Nset, nset="HPC6 CENTER"
4816,
*Nset, nset="HPC7 CASING"
5978, 5979, 6066, 6067, 6109, 6110
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*Elset, elset="HPC7 CASING"
5738, 5739, 5825, 5826, 5827, 5828
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*Nset, nset="HPC7 CENTER"
4815,
*Nset, nset="HPC8 CASING"
5976, 5977, 6068, 6069, 6107, 6108
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*Elset, elset="HPC8 CASING"
5737, 5738, 5827, 5828, 5829, 5830
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*Nset, nset="HPC8 CENTER"
4814,
*Nset, nset="HPC9 CASING"
5974, 5975, 6070, 6071, 6105, 6106
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*Elset, elset="HPC9 CASING"
5736, 5737, 5829, 5830, 5831, 5832
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*Nset, nset="HPC9 CENTER"
4813,
*Nset, nset="HPC10 CASING"
5972, 5973, 6072, 6073, 6103, 6104
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*Elset, elset="HPC10 CASING"
5735, 5736, 5831, 5832, 5833, 5837
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*Nset, nset="HPC10 CENTER"
4812,
*Nset, nset="HPT1 CASING"
5968, 5969, 6076, 6077, 6099, 6100
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*Elset, elset="HPT1 CASING"
5730, 5731, 5841, 5842, 5843, 5845
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*Nset, nset="HPT1 CENTER"
4810,
*Nset, nset="HPT2 CASING"
5733, 5734, 5740, 5744, 5748, 5752
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*Elset, elset="HPT2 CASING"
5535, 5537, 5538, 5540, 5541, 5544
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*Nset, nset="HPT2 CENTER"
4809,
*Nset, nset="INTERCASE MASTER"
4822,
*Nset, nset="IPC1 CASING"
6020, 6022, 6037, 6040, 6139, 6142
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*Elset, elset="IPC1 CASING"
5769, 5772, 5788, 5791, 5945, 5992
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*Nset, nset="IPC1 CENTER"
4826,
*Nset, nset="IPC2 CASING"
6014, 6015, 6035, 6036, 6146, 6147
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*Elset, elset="IPC2 CASING"
5765, 5767, 5787, 5794, 5952, 5959
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*Nset, nset="IPC2 CENTER"
4825,
*Nset, nset="IPC3 CASING"
6016, 6017, 6042, 6043, 6133, 6134
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*Elset, elset="IPC3 CASING"
5766, 5768, 5795, 5796, 5797, 5798
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*Nset, nset="IPC3 CENTER"
4823,
*Nset, nset="IPT1 CASING"
5851, 5852, 5854, 5858, 5862, 5866
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*Elset, elset="IPT1 CASING"
5629, 5630, 5633, 5636, 5637, 5640
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*Nset, nset="IPT1 CENTER"
4807,
*Nset, nset="IPT2 CASING"
5964, 5965, 6080, 6081, 6095, 6096
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*Elset, elset="IPT2 CASING"
5725, 5726, 5851, 5852, 5853, 5855
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*Nset, nset="IPT2 CENTER"
4806,
*Nset, nset="IPT3 CASING"
5962, 5963, 6082, 6083, 6093, 6094
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*Elset, elset="IPT3 CASING"
5723, 5724, 5854, 5856, 5857, 5858
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*Nset, nset="IPT3 CENTER"
4805,
*Nset, nset="IPT4 CASING"
5621, 5622, 5628, 5632, 5636, 5640
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*Elset, elset="IPT4 CASING"
5443, 5445, 5446, 5448, 5449, 5452
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*Nset, nset="IPT4 CENTER"
4804,
*Nset, nset="OGV ALL", generate
4866, 4881,   1
*Nset, nset="OGV ALL", generate
4882, 4897,   1
*Nset, nset="OGV ALL", generate
4898, 4913,   1
*Nset, nset="OGV ALL", generate
4930, 4945,   1
*Nset, nset="OGV ALL", generate
4994, 5009,   1
*Nset, nset="OGV ALL", generate
5250, 5265,   1
*Nset, nset="OGV ALL", generate
5122, 5137,   1
*Nset, nset="OGV ALL", generate
5378, 5393,   1
*Nset, nset="OGV ALL", generate
5058, 5073,   1
*Nset, nset="OGV ALL", generate
5314, 5329,   1
*Nset, nset="OGV ALL", generate
5186, 5201,   1
*Nset, nset="OGV ALL", generate
5442, 5457,   1
*Nset, nset="OGV ALL", generate
4962, 4977,   1
*Nset, nset="OGV ALL", generate
5026, 5041,   1
*Nset, nset="OGV ALL", generate
5282, 5297,   1
*Nset, nset="OGV ALL", generate
5154, 5169,   1
*Nset, nset="OGV ALL", generate
5410, 5425,   1
*Nset, nset="OGV ALL", generate
5090, 5105,   1
*Nset, nset="OGV ALL", generate
5346, 5361,   1
*Nset, nset="OGV ALL", generate
5218, 5233,   1
*Nset, nset="OGV ALL", generate
5474, 5489,   1
*Nset, nset="OGV ALL", generate
4914, 4929,   1
*Nset, nset="OGV ALL", generate
4946, 4961,   1
*Nset, nset="OGV ALL", generate
5010, 5025,   1
*Nset, nset="OGV ALL", generate
5266, 5281,   1
*Nset, nset="OGV ALL", generate
5138, 5153,   1
*Nset, nset="OGV ALL", generate
5394, 5409,   1
*Nset, nset="OGV ALL", generate
5074, 5089,   1
*Nset, nset="OGV ALL", generate
5330, 5345,   1
*Nset, nset="OGV ALL", generate
5202, 5217,   1
*Nset, nset="OGV ALL", generate
5458, 5473,   1
*Nset, nset="OGV ALL", generate
4978, 4993,   1
*Nset, nset="OGV ALL", generate
5042, 5057,   1
*Nset, nset="OGV ALL", generate
5298, 5313,   1
*Nset, nset="OGV ALL", generate
5170, 5185,   1
*Nset, nset="OGV ALL", generate
5426, 5441,   1
*Nset, nset="OGV ALL", generate
5106, 5121,   1
*Nset, nset="OGV ALL", generate
5362, 5377,   1
*Nset, nset="OGV ALL", generate
5234, 5249,   1
*Nset, nset="OGV ALL", generate
5490, 5505,   1
*Elset, elset="OGV ALL", generate
4705, 4719,   1
*Elset, elset="OGV ALL", generate
4720, 4734,   1
*Elset, elset="OGV ALL", generate
4735, 4749,   1
*Elset, elset="OGV ALL", generate
4765, 4779,   1
*Elset, elset="OGV ALL", generate
4825, 4839,   1
*Elset, elset="OGV ALL", generate
5065, 5079,   1
*Elset, elset="OGV ALL", generate
4945, 4959,   1
*Elset, elset="OGV ALL", generate
5185, 5199,   1
*Elset, elset="OGV ALL", generate
4885, 4899,   1
*Elset, elset="OGV ALL", generate
5125, 5139,   1
*Elset, elset="OGV ALL", generate
5005, 5019,   1
*Elset, elset="OGV ALL", generate
5245, 5259,   1
*Elset, elset="OGV ALL", generate
4795, 4809,   1
*Elset, elset="OGV ALL", generate
4855, 4869,   1
*Elset, elset="OGV ALL", generate
5095, 5109,   1
*Elset, elset="OGV ALL", generate
4975, 4989,   1
*Elset, elset="OGV ALL", generate
5215, 5229,   1
*Elset, elset="OGV ALL", generate
4915, 4929,   1
*Elset, elset="OGV ALL", generate
5155, 5169,   1
*Elset, elset="OGV ALL", generate
5035, 5049,   1
*Elset, elset="OGV ALL", generate
5275, 5289,   1
*Elset, elset="OGV ALL", generate
4750, 4764,   1
*Elset, elset="OGV ALL", generate
4780, 4794,   1
*Elset, elset="OGV ALL", generate
4840, 4854,   1
*Elset, elset="OGV ALL", generate
5080, 5094,   1
*Elset, elset="OGV ALL", generate
4960, 4974,   1
*Elset, elset="OGV ALL", generate
5200, 5214,   1
*Elset, elset="OGV ALL", generate
4900, 4914,   1
*Elset, elset="OGV ALL", generate
5140, 5154,   1
*Elset, elset="OGV ALL", generate
5020, 5034,   1
*Elset, elset="OGV ALL", generate
5260, 5274,   1
*Elset, elset="OGV ALL", generate
4810, 4824,   1
*Elset, elset="OGV ALL", generate
4870, 4884,   1
*Elset, elset="OGV ALL", generate
5110, 5124,   1
*Elset, elset="OGV ALL", generate
4990, 5004,   1
*Elset, elset="OGV ALL", generate
5230, 5244,   1
*Elset, elset="OGV ALL", generate
4930, 4944,   1
*Elset, elset="OGV ALL", generate
5170, 5184,   1
*Elset, elset="OGV ALL", generate
5050, 5064,   1
*Elset, elset="OGV ALL", generate
5290, 5304,   1
*Nset, nset=RP-6
10939,
*Nset, nset="Roll bearing hp ip slave"
5737, 5738, 5742, 5746, 5750, 5754
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*Elset, elset="Roll bearing hp ip slave"
5536, 5539, 5542, 5543, 5546, 5549
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*Nset, nset=Set-40
10934,
*Nset, nset=Set-41
10935,
*Nset, nset=Set-42
10936,
*Nset, nset=Set-43
10937,
*Nset, nset=Set-44
10938,
*Nset, nset=Set-45
10939,
*Nset, nset=Set-46
10940,
*Nset, nset=Set-47
4827,
*Nset, nset=Set-48
4824,
*Nset, nset=Set-50
4822,
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*Nset, nset="hp/ip master roller bearing"
4808,
*Nset, nset="intercase slave"
4824,
*Nset, nset="intercase slave"
6000, 6001, 6048, 6049, 6127, 6128
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*Elset, elset="intercase slave"
5752, 5756, 5805, 5806, 5807, 5808
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*Nset, nset=interface
5583, 5587, 5591, 6470, 6471, 6474
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*Elset, elset=interface
6474, 6475, 6480, 6481, 9828, 9829
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*Nset, nset=m_Set-7
4827,
*Nset, nset=m_Set-30
10938,
*Nset, nset=m_Set-32
10937,
*Nset, nset=m_Set-34
10936,
*Nset, nset=m_Set-36
10935,
*Nset, nset=m_Set-38
10934,
*Nset, nset=m_Set-112
10941,
*Nset, nset=m_Set-114
10942,
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*Nset, nset=s_Set-26
7,    9,   10,   13,   25,   27
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*Elset, elset=s_Set-26
58,   68,  141,  151,  208,  218
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*Nset, nset=s_Set-63
5511, 5512, 5514, 5518, 5522, 5526
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*Elset, elset=s_Set-63
5308, 5310, 5314, 5318, 5320, 5324
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*Nset, nset=s_Set-64
5621, 5622, 5628, 5632, 5636, 5640
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*Elset, elset=s_Set-64
5443, 5445, 5446, 5448, 5449, 5452
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*Nset, nset=s_Set-65
5851, 5852, 5854, 5858, 5862, 5866
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*Elset, elset=s_Set-65
5629, 5630, 5633, 5636, 5637, 5640
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*Nset, nset=s_Set-66
5733, 5734, 5740, 5744, 5748, 5752
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*Elset, elset=s_Set-66
5535, 5537, 5538, 5540, 5541, 5544
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*Nset, nset=s_Set-67
5970, 5971, 6074, 6075, 6101, 6102
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*Elset, elset=s_Set-67
5731, 5732, 5836, 5840, 5841, 5842
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*Nset, nset=s_Set-68
5972, 5973, 6072, 6073, 6103, 6104
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*Elset, elset=s_Set-68
5735, 5736, 5831, 5832, 5833, 5837
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*Nset, nset=s_Set-77
6006, 6007, 6031, 6032, 6144, 6145
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*Elset, elset=s_Set-77
5755, 5758, 5781, 5783, 5950, 5951
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*Nset, nset=s_Set-112
6002, 6005, 6027, 6030, 6151, 6154
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*Elset, elset=s_Set-112
5753, 5779, 5961, 5963, 5974, 5976
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*Nset, nset=s_Set-114
1,    4,   16,   18,   19,   22
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*Elset, elset=s_Set-114
1,    4,    7,   94,   97,  100
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*Nset, nset=s_Set-172
1,    2,    3,    4,    5,    6
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*Nset, nset="tail master"
4803,
*Nset, nset="tail roller slave"
5507, 5508, 5516, 5520, 5524, 5528
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*Nset, nset="tail roller slave", generate
10947, 10951,   2
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*Elset, elset=_m_Surf-1_SPOS
1,    2,    3,    4,    5,    6
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*Surface, type=ELEMENT, name=m_Surf-1
_m_Surf-1_SPOS, SPOS
*Elset, elset=_m_Surf-7_SPOS
5764, 5765, 5767, 5786, 5787, 5794
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*Surface, type=ELEMENT, name=m_Surf-7
_m_Surf-7_SPOS, SPOS
*Elset, elset=_m_Surf-8_, generate
4641, 4676,   1
*Elset, elset=_m_Surf-8_SNEG
5305, 5306, 5307, 5308, 5309, 5310
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*Surface, type=ELEMENT, name=m_Surf-8
_m_Surf-8_,
_m_Surf-8_SNEG, SNEG
*Elset, elset=_s_Surf-5_SNEG
5756, 5761, 5762, 5763, 5766, 5797
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*Surface, type=ELEMENT, name=s_Surf-5
_s_Surf-5_SNEG, SNEG
*Elset, elset=_s_Surf-7_SNEG
5999, 6000, 6001, 6004, 6345, 6359
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*Surface, type=ELEMENT, name=s_Surf-7
_s_Surf-7_SNEG, SNEG
*Elset, elset=_s_Surf-8_SNEG
5799, 5800, 5801, 5802, 5803, 5804
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*Surface, type=ELEMENT, name=s_Surf-8
_s_Surf-8_SNEG, SNEG
*Elset, elset=_s_Surf-9_SNEG
8194, 8195, 8200, 8201, 8202, 8203, 8204, 8205,10601,10602,10603,10604,10605,10606,10613,10614
*Surface, type=ELEMENT, name=s_Surf-9
_s_Surf-9_SNEG, SNEG
*Surface, type=NODE, name="OGV ALL_CNS_"
"OGV ALL", 1.
*Surface, type=NODE, name=s_Set-172_CNS_
s_Set-172, 1.
*Surface, type=NODE, name=s_Set-77_CNS_
s_Set-77, 1.
*Surface, type=NODE, name="intercase slave_CNS_"
"intercase slave", 1.
*Surface, type=NODE, name="Roll bearing hp ip slave_CNS_"
"Roll bearing hp ip slave", 1.
*Surface, type=NODE, name="tail roller slave_CNS_"
"tail roller slave", 1.
*Surface, type=NODE, name=s_Set-26_CNS_
s_Set-26, 1.
*Surface, type=NODE, name=s_Set-63_CNS_
s_Set-63, 1.
*Surface, type=NODE, name=s_Set-64_CNS_
s_Set-64, 1.
*Surface, type=NODE, name=s_Set-65_CNS_
s_Set-65, 1.
*Surface, type=NODE, name=s_Set-66_CNS_
s_Set-66, 1.
*Surface, type=NODE, name=s_Set-67_CNS_
s_Set-67, 1.
*Surface, type=NODE, name=s_Set-68_CNS_
s_Set-68, 1.
*Surface, type=NODE, name=s_Set-112_CNS_
s_Set-112, 1.
*Surface, type=NODE, name=s_Set-114_CNS_
s_Set-114, 1.
** Constraint: Constraint-1
*Tie, name=Constraint-1, adjust=no, position tolerance=1.
s_Set-172_CNS_, "OGV ALL_CNS_"
** Constraint: Constraint-2
*Tie, name=Constraint-2, adjust=no, position tolerance=1.
m_Surf-7, "OGV ALL_CNS_"
** Constraint: Constraint-4
*Coupling, constraint name=Constraint-4, ref node=m_Set-7, surface=s_Set-77_CNS_
*Kinematic
2, 2
3, 3
5, 5
6, 6
** Constraint: Constraint-5
*Coupling, constraint name=Constraint-5, ref node="INTERCASE MASTER", surface="intercase slave_CNS_"
*Kinematic
** Constraint: Constraint-6
*Coupling, constraint name=Constraint-6, ref node="hp/ip master roller bearing", surface="Roll bearing hp ip slave_CNS_"
*Kinematic
2, 2
3, 3
5, 5
6, 6
** Constraint: Constraint-7
*Coupling, constraint name=Constraint-7, ref node="tail master", surface="tail roller slave_CNS_"
*Kinematic
2, 2
3, 3
5, 5
6, 6
** Constraint: Constraint-8
*Coupling, constraint name=Constraint-8, ref node="Air intake force point", surface=s_Set-26_CNS_
*Distributing, weighting method=UNIFORM, coupling=STRUCTURAL
** Constraint: Constraint-9
*Coupling, constraint name=Constraint-9, ref node=RP-6, surface=s_Set-63_CNS_
*Distributing, weighting method=UNIFORM, coupling=STRUCTURAL
** Constraint: Constraint-10
*Coupling, constraint name=Constraint-10, ref node=m_Set-30, surface=s_Set-64_CNS_
*Distributing, weighting method=UNIFORM, coupling=STRUCTURAL
** Constraint: Constraint-11
*Coupling, constraint name=Constraint-11, ref node=m_Set-32, surface=s_Set-65_CNS_
*Distributing, weighting method=UNIFORM, coupling=STRUCTURAL
** Constraint: Constraint-12
*Coupling, constraint name=Constraint-12, ref node=m_Set-34, surface=s_Set-66_CNS_
*Distributing, weighting method=UNIFORM, coupling=STRUCTURAL
** Constraint: Constraint-13
*Coupling, constraint name=Constraint-13, ref node=m_Set-36, surface=s_Set-67_CNS_
*Distributing, weighting method=UNIFORM, coupling=STRUCTURAL
** Constraint: Constraint-14
*Coupling, constraint name=Constraint-14, ref node=m_Set-38, surface=s_Set-68_CNS_
*Distributing, weighting method=UNIFORM, coupling=STRUCTURAL
** Constraint: Constraint-16
*Coupling, constraint name=Constraint-16, ref node=m_Set-112, surface=s_Set-112_CNS_
*Distributing, weighting method=UNIFORM, coupling=STRUCTURAL
** Constraint: Constraint-17
*Coupling, constraint name=Constraint-17, ref node=m_Set-114, surface=s_Set-114_CNS_
*Distributing, weighting method=UNIFORM, coupling=STRUCTURAL
*Element, type=MASS, elset="Set-116_Mass FAN_MASS_"
10641, 10942
*Mass, elset="Set-116_Mass FAN_MASS_"
0.657708,
*Element, type=ROTARYI, elset="Set-116_Mass FAN_ROTI_"
10642, 10942
*Rotary Inertia, elset="Set-116_Mass FAN_ROTI_"
2.3e+06, 1.22e+06, 1.22e+06, 0., 0., 0.
*Element, type=MASS, elset="Set-117_Mass torque box_MASS_"
10643, 10941
*Mass, elset="Set-117_Mass torque box_MASS_"
0.328854,
*Element, type=ROTARYI, elset="Set-117_Mass torque box_ROTI_"
10644, 10941
*Rotary Inertia, elset="Set-117_Mass torque box_ROTI_"
320000., 197000., 197000., 0., 0., 0.
**
** MATERIALS
**
*Material, name=INCONEL
*Density
7.8e-09,
*Elastic
210000., 0.29
*Material, name=Titanium
*Density
4.507e-09,
*Elastic
110000., 0.31
** ----------------------------------------------------------------
**
** STEP: Step-2
**
*Step, name=Step-2, nlgeom=NO, perturbation
*Static
**
** OUTPUT REQUESTS
**
**
** FIELD OUTPUT: F-Output-3
**
*Output, field, variable=PRESELECT
*Output, history, frequency=0
*Node Print, nset="FAN CASING"
u,COORD
*Node Print, nset="FAN CENTER"
u,COORD
*Node Print, nset="IPC1 CASING"
u,COORD
*Node Print, nset="IPC1 CENTER"
u,COORD
*Node Print, nset="IPC2 CASING"
u,COORD
*Node Print, nset="IPC2 CENTER"
u,COORD
*Node Print, nset="IPC3 CASING"
u,COORD
*Node Print, nset="IPC3 CENTER"
u,COORD
*Node Print, nset="HPC1 CASING"
u,COORD
*Node Print, nset="HPC1 CENTER"
u,COORD
*Node Print, nset="HPC2 CASING"
u,COORD
*Node Print, nset="HPC2 CENTER"
u,COORD
*Node Print, nset="HPC3 CASING"
u,COORD
*Node Print, nset="HPC3 CENTER"
u,COORD
*Node Print, nset="HPC4 CASING"
u,COORD
*Node Print, nset="HPC4 CENTER"
u,COORD
*Node Print, nset="HPC5 CASING"
u,COORD
*Node Print, nset="HPC5 CENTER"
u,COORD
*Node Print, nset="HPC6 CASING"
u,COORD
*Node Print, nset="HPC6 CENTER"
u,COORD
*Node Print, nset="HPC7 CASING"
u,COORD
*Node Print, nset="HPC7 CENTER"
u,COORD
*Node Print, nset="HPC8 CASING"
u,COORD
*Node Print, nset="HPC8 CENTER"
u,COORD
*Node Print, nset="HPC9 CASING"
u,COORD
*Node Print, nset="HPC9 CENTER"
u,COORD
*Node Print, nset="HPC10 CASING"
u,COORD
*Node Print, nset="HPC10 CENTER"
u,COORD
*Node Print, nset="HPT1 CASING"
u,COORD
*Node Print, nset="HPT1 CENTER"
u,COORD
*Node Print, nset="HPT2 CASING"
u,COORD
*Node Print, nset="HPT2 CENTER"
u,COORD
*Node Print, nset="IPT1 CASING"
u,COORD
*Node Print, nset="IPT1 CENTER"
u,COORD
*Node Print, nset="IPT2 CASING"
u,COORD
*Node Print, nset="IPT2 CENTER"
u,COORD
*Node Print, nset="IPT3 CASING"
u,COORD
*Node Print, nset="IPT3 CENTER"
u,COORD
*Node Print, nset="IPT4 CASING"
u,COORD
*Node Print, nset="IPT4 CENTER"
u,COORD
*Node Print, nset=interface
u,COORD
**
** LOAD CASES
**
*Load Case, name=FX
** Name: BC-2 Type: Displacement/Rotation   Scale factor: 1
*Boundary, op=NEW
interface, 1, 1
interface, 3, 3
interface, 5, 5
** Name: BC-8 Type: Displacement/Rotation   Scale factor: 1
*Boundary, op=NEW
interface, 2, 2
interface, 4, 4
interface, 6, 6
** Name: FAN shaft thrust   Type: Concentrated force   Scale factor: 1
*Cload
Set-47, 1, -61451.9
** Name: FX-casing 1   Type: Concentrated force   Scale factor: 1
*Cload
Set-40, 1, -26509.2
** Name: FX-casing 2   Type: Concentrated force   Scale factor: 1
*Cload
Set-41, 1, -26509.2
** Name: FX-casing 3   Type: Concentrated force   Scale factor: 1
*Cload
Set-42, 1, -26509.2
** Name: FX-casing 4   Type: Concentrated force   Scale factor: 1
*Cload
Set-43, 1, -26509.2
** Name: FX-casing 5   Type: Concentrated force   Scale factor: 1
*Cload
Set-44, 1, -26509.2
** Name: FX-casing 6   Type: Concentrated force   Scale factor: 1
*Cload
Set-45, 1, -26509.2
** Name: HP Shaft Thrust   Type: Concentrated force   Scale factor: 1
*Cload
Set-50, 1, 16703.
** Name: IP rotor thrust   Type: Concentrated force   Scale factor: 1
*Cload
Set-48, 1, 151982.
** Name: OGV load   Type: Line load   Scale factor: 1
*Dload
"OGV ALL", PX, -0.169977
*End Load Case
*Load Case, name=Fz
** Name: BC-2 Type: Displacement/Rotation   Scale factor: 1
*Boundary, op=NEW
interface, 1, 1
interface, 3, 3
interface, 5, 5
** Name: BC-8 Type: Displacement/Rotation   Scale factor: 1
*Boundary, op=NEW
interface, 2, 2
interface, 4, 4
interface, 6, 6
** Name: FZ air intake   Type: Concentrated force   Scale factor: 1
*Cload
Set-46, 3, 20000.
*End Load Case
*Load Case, name=gravity
** Name: BC-2 Type: Displacement/Rotation   Scale factor: 1
*Boundary, op=NEW
interface, 1, 1
interface, 3, 3
interface, 5, 5
** Name: BC-8 Type: Displacement/Rotation   Scale factor: 1
*Boundary, op=NEW
interface, 2, 2
interface, 4, 4
interface, 6, 6
** Name: Gravity   Type: Gravity   Scale factor: 1
*Dload
, GRAV, 1., 0., 0., -1.
*End Load Case
*End Step
